// SBML level 2 version 4

model New_Model()
  // GHRH-mediated signalling

  // Compartments:
  compartment Cell = 1e-15;

  // Species:
  species GHRH in Cell = 1e-8;
  species GHRHR_inactive in Cell = 2.72e-11;
  species GNAS_GDP in Cell = 1.9318e-13;
  species Adenylate_cyclase in Cell = 4.97e-11;
  species ATP in Cell = 8.801e-15;
  species cAMP in Cell = 0;
  species PDE in Cell = 1.53199277e-6;
  species _5AMP in Cell = 0;
  species PKA in Cell = 2.3e-7;
  species CREB in Cell = 8.3028894e-5;
  species PCREB in Cell = 0;
  species CRE in Cell = 3.321156e-9;
  species GDP in Cell = 0;
  species GTP in Cell = 0;
  species GHRHR_active in Cell = 0;
  species GNAS_GTP in Cell = 0;
  species Adenylate_cyclase_active in Cell = 0;
  species PKA_active in Cell = 0;
  species CRE_active in Cell = 0;
  species cAMP_genes in Cell = 0;

  // Parameters:
  k_GHRHR_activation = 100000000000;
  k_GNAS_activation = 5000000000000;
  k_cAMP_synthesis = 49200000000000;
  k_Adenylate_cyclase_activation = 0.0026;
  k_cAMP_degradation = 4.25e-6;
  k_PKA_activation = 260000;
  k_CREB_phosphorylation = 2650000000000;
  k_CRE_activation = 100000000000;
  k_cAMP_genes_transcription = 100000000000;
  k_CREB_dissociation_from_CRE = 0.42;
  kr_Adenylate_cyclase = 400 unit_0;
  kr_PKA = 1;

  // Reactions:
  GHRHR_activation: GHRH + GHRHR_inactive -> GHRHR_active; Cell*(k_GHRHR_activation*GHRH*GHRHR_inactive - k2*GHRHR_active);
    k2 = 0.1;
  G_protein_Activation: GHRHR_active + GNAS_GDP => GNAS_GTP + GHRHR_active; Cell*k_GNAS_activation*GHRHR_active*GNAS_GDP;
  Activation_of_Adenylate_cyclase: GNAS_GTP + Adenylate_cyclase -> Adenylate_cyclase_active; Cell*(k_Adenylate_cyclase_activation*GNAS_GTP*Adenylate_cyclase - kr_Adenylate_cyclase*Adenylate_cyclase_active);
  cAMP_synthesis: Adenylate_cyclase_active + ATP => cAMP + Adenylate_cyclase_active; Cell*k_cAMP_synthesis*Adenylate_cyclase_active*ATP;
  cAMP_degradation: cAMP + PDE => _5AMP + PDE; Cell*k_cAMP_degradation*cAMP*PDE;
  PKA_activation: PKA + cAMP -> PKA_active; Cell*(k_PKA_activation*PKA*cAMP - kr_PKA*PKA_active);
  CREB_phosphorylation: PKA_active + CREB => PKA_active + PCREB; Cell*k_CREB_phosphorylation*PKA_active*CREB;
  CRE_binding: PCREB + CRE -> CRE_active; Cell*(k_CRE_activation*PCREB*CRE - k_CREB_dissociation_from_CRE*CRE_active);
  cAMP_genes_transcription: CRE_active => CRE_active + cAMP_genes; Cell*k_cAMP_genes_transcription*CRE_active;

  // Unit definitions:
  unit unit_0 = 1 / second; unit_0 is "1/s";
end
